# OpenSim document version 30000
Model arm26_optimize:
  publications: .
  length_units: meters
  force_units: N
  gravity: 0 -9.80665 0
  credits:
    Sources for this model:
    The OpenSim Development Team (Reinbolt, J; Seth, A; Habib, A; Hamner, S)'s Arm26 model, adapted from a model originally created by Kate Holzbaur (11/22/04)
    the MoBL_ARMS_Upper_Limb_Model_OpenSim.osim model, which is also inspired by the Holzbaur model.
    DynamicWalkingStarter/Model/WalkerModelTerrain.osim, for how to implement contact forces/geometries directly in the xml.
    This model was enormously simplified and is NOT AT ALL SUITABLE FOR SERIOUS BIO-MECHANICAL SIMULATIONS. In particular:
    - All bones are fixed except for the upper and lower arm (e.g. the clavicle and scapula are fixed).
    - It does not include wrapping surfaces
    - It uses muscle data from some models
    - I had to incorporate data from various models in ad hoc manner. In particular, some muscle attachment points are HIGHLY IMPRECISE estimates (due to varying coordinate systems).
    Do not use this model for anything else than testing a control method. Any conclusion about body behaviour derived from this model will almost certainly be wrong.
  BodySet:
    Body ground: mass=0 mass_center=(0 0 0) inertia_xx=0 inertia_yy=0 inertia_zz=0
        meshes=(ground_ribs.vtp ground_spine.vtp ground_skull.vtp ground_jaw.vtp ground_r_clavicle.vtp ground_r_scapula.vtp)
    Body clavicle: mass=0.156 mass_center=(-0.011096 0.0063723 0.054168) inertia_xx=0.00024259 inertia_yy=0.00025526
        inertia_zz=0.00004442 inertia_xy=-0.00001898 inertia_xz=-0.00006994 inertia_yz=0.00005371 meshes=clavicle.vtp
      WeldJoint sternoclavicular: parent_body=ground location_in_parent=(0.006325 0.00693 0.025465) location=(0 0 0)
    Body scapula: mass=0.70396 mass_center=(-0.054694 -0.035032 -0.043734) inertia_xx=0.0012429 inertia_yy=0.0011504
        inertia_zz=0.0013651 inertia_xy=0.0004494 inertia_xz=0.00040922 inertia_yz=0.0002411 meshes=scapula.vtp
      WeldJoint acromioclavicular: parent_body=clavicle location_in_parent=(-0.01433 0.02007 0.135535) location=(0 0 0)
    Body r_humerus: mass=1.864572 mass_center=(0 -0.180496 0) inertia_xx=0.01481 inertia_yy=0.004551
        inertia_zz=0.013193 meshes=arm_r_humerus.vtp
      CustomJoint r_shoulder: parent_body=ground location_in_parent=(-0.017545 -0.007 0.17) location=(0 0 0)
        Coordinate r_shoulder_elev: motion_type=rotational default_value=0 range=(-1.570796 3.141593) clamped=false
          # CLAMPING IS SIMPLY IGNORED ! I had to put a Coordinate Limit force further below.
        # I added this to provide a second degree of freedom to the shoulder. The shoulder thus acts as a double-hinge, rather than a full 3-DoF ball-and-socket joint.
        Coordinate r_shoulder_angle: motion_type=rotational default_value=0 range=(-3.14 0) clamped=false
        # 3rd degree of freedom for shoulder
        Coordinate shoulder_rot: motion_type=rotational default_value=0 initial_value=0 range=(-1.570796 0.3490659)
            clamped=false
        SpatialTransform: axes_held_at_zero=(translation1 translation2 translation3)
          TransformAxis rotation1: coordinates=shoulder_rot axis=(0 1 0) LinearFunction(coefficients=1 0)
          TransformAxis rotation2: coordinates=r_shoulder_angle axis=(1 0 0) LinearFunction(coefficients=1 0)
          TransformAxis rotation3: coordinates=r_shoulder_elev axis=(-0.05889802 0.0023 0.9982614)
              LinearFunction(coefficients=1 0)
    Body r_ulna_radius_hand: mass=1.534315 mass_center=(0 -0.181479 0) inertia_xx=0.019281 inertia_yy=0.001571
        inertia_zz=0.020062
        meshes=(arm_r_ulna.vtp arm_r_radius.vtp arm_r_lunate.vtp arm_r_scaphoid.vtp arm_r_pisiform.vtp arm_r_triquetrum.vtp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)
      CustomJoint r_elbow: parent_body=r_humerus location_in_parent=(0.0061 -0.2904 -0.0123) location=(0 0 0)
        Coordinate r_elbow_flex: motion_type=rotational default_value=0 range=(0 2.268928) clamped=false
        SpatialTransform: axes_held_at_zero=(rotation1 rotation2 translation1 translation2 translation3)
          TransformAxis rotation3: coordinates=r_elbow_flex axis=(0.04940001 0.03660001 0.9981083)
              LinearFunction(coefficients=1 0)
  ForceSet:
    Thelen2003Muscle [values shared by the 16 below unless stated]: optimal_force=1 max_contraction_velocity=10
        activation_time_constant=0.01 deactivation_time_constant=0.04 FmaxTendonStrain=0.033 FmaxMuscleStrain=0.6
        KshapeActive=0.5 KshapePassive=4 Af=0.3 Flen=1.8
    Thelen2003Muscle TRIlong: min_control=0 max_control=1 max_isometric_force=798.52 optimal_fiber_length=0.134
        tendon_slack_length=0.143 pennation_angle_at_optimal=0.2094395 [radians] damping=0.017
      PathPoint P1: ground (-0.05365 -0.01373 0.14723)
      PathPoint P2: r_humerus (-0.02714 -0.11441 -0.00664)
      PathPoint P3: r_humerus (-0.03184 -0.22637 -0.01217)
      PathPoint P4: r_humerus (-0.01743 -0.26757 -0.01208)
      PathPoint P5: r_ulna_radius_hand (-0.0219 0.01046 -0.00078)
    Thelen2003Muscle TRIlat: min_control=0 max_control=1 max_isometric_force=624.3 optimal_fiber_length=0.1138
        tendon_slack_length=0.098 pennation_angle_at_optimal=0.1570796 damping=0.017
      PathPoint P1: r_humerus (-0.00599 -0.12646 0.00428)
      PathPoint P2: r_humerus (-0.02344 -0.14528 0.00928)
      PathPoint P3: r_humerus (-0.03184 -0.22637 -0.01217)
      PathPoint P4: r_humerus (-0.01743 -0.26757 -0.01208)
      PathPoint P5: r_ulna_radius_hand (-0.0219 0.01046 -0.00078)
    Thelen2003Muscle TRImed: min_control=0 max_control=1 max_isometric_force=624.3 optimal_fiber_length=0.1138
        tendon_slack_length=0.0908 pennation_angle_at_optimal=0.1570796 damping=0.017
      PathPoint P1: r_humerus (-0.00838 -0.13695 -0.00906)
      PathPoint P2: r_humerus (-0.02601 -0.15139 -0.0108)
      PathPoint P3: r_humerus (-0.03184 -0.22637 -0.01217)
      PathPoint P4: r_humerus (-0.01743 -0.26757 -0.01208)
      PathPoint P5: r_ulna_radius_hand (-0.0219 0.01046 -0.00078)
    Thelen2003Muscle BIClong: min_control=0 max_control=1 max_isometric_force=624.3 optimal_fiber_length=0.1157
        tendon_slack_length=0.2723 pennation_angle_at_optimal=0 damping=0.017
      PathPoint P1: ground (-0.039235 0.00347 0.14795)
      PathPoint P3: r_humerus (0.02131 0.01793 0.01028)
      PathPoint P4: r_humerus (0.02378 -0.00511 0.01201)
      PathPoint P5: r_humerus (0.01345 -0.02827 0.00136)
      PathPoint P6: r_humerus (0.01068 -0.07736 -0.00165)
      PathPoint P7: r_humerus (0.01703 -0.12125 0.00024)
      PathPoint P8: r_humerus (0.0228 -0.1754 -0.0063)
      PathPoint P9: r_ulna_radius_hand (0.00751 -0.04839 0.02179)
    Thelen2003Muscle BICshort: min_control=0 max_control=1 max_isometric_force=435.56 optimal_fiber_length=0.1321
        tendon_slack_length=0.1923 pennation_angle_at_optimal=0 damping=0.017
      PathPoint P1: ground (0.004675 -0.01231 0.13475)
      PathPoint P2: ground (-0.007075 -0.04004 0.14507)
      PathPoint P3: r_humerus (0.01117 -0.07576 -0.01101)
      PathPoint P4: r_humerus (0.01703 -0.12125 -0.01079)
      PathPoint P5: r_humerus (0.0228 -0.1754 -0.0063)
      PathPoint P6: r_ulna_radius_hand (0.00751 -0.04839 0.02179)
    Thelen2003Muscle BRA: min_control=0 max_control=1 max_isometric_force=987.26 optimal_fiber_length=0.0858
        tendon_slack_length=0.0535 pennation_angle_at_optimal=0 damping=0.017
      PathPoint P1: r_humerus (0.0068 -0.1739 -0.0036)
      PathPoint P4: r_ulna_radius_hand (0.04 -0.06 0.002)
        # THIS WAS MODIFIED ! Due to fact that here we use joined humerus-ulna-hand, not just ulna as in original models (modified values are pretty arbitrary)
        # first coordinate seems to be 'front-back', second coordinate along the bone (up-down, negative down), third coord left-right (positive left) when looking at the skeleton with its arm hanging down
    Thelen2003Muscle PECM1: min_control=0 max_control=1 time_scale=0.1 activation1=7.667 activation2=1.459854
        max_isometric_force=444.3 optimal_fiber_length=0.1442 tendon_slack_length=0.0028
        pennation_angle_at_optimal=0.296706 damping=0.017
      PathPoint P1: r_humerus (0.01169 -0.04191 0.0078)
      PathPoint default: r_humerus (0.01811667 -0.03355 -0.00097)
      PathPoint default: ground (-0.00485333 0.00511 0.1119067)
      PathPoint P2: clavicle (0.00321 -0.00013 0.05113)
      # Values for the Thelen muscle, taken from BRA muscle . NOTE: Several of these values are overriden just below - the overriding values are from the MoBL model Schutte model for this muscle and are correct.
    Thelen2003Muscle PECM2: min_control=0 max_control=1 time_scale=0.1 activation1=7.667 activation2=1.459854
        max_isometric_force=658.3 optimal_fiber_length=0.1385 tendon_slack_length=0.089
        pennation_angle_at_optimal=0.4537856 damping=0.017
      PathPoint P1: r_humerus (0.01274 -0.04289 0.00785)
      PathPoint P1b: r_humerus (0.01649667 -0.03878 -0.00207)
      PathPoint P1c: ground (0.02061333 -0.02625 0.1206667)
      PathPoint P4: ground (0.03091 -0.03522 0.09705)
      PathPoint P5: ground (0.02769 -0.04498 0.02271)
      # Values for the Thelen muscle, taken from BRA muscle . NOTE: Several of these values are overriden just below - the overriding values are from the MoBL model Schutte model for this muscle and are correct.
    Thelen2003Muscle PECM3: min_control=0 max_control=1 time_scale=0.1 activation1=7.667 activation2=1.459854
        max_isometric_force=498.1 optimal_fiber_length=0.1385 tendon_slack_length=0.132
        pennation_angle_at_optimal=0.4363323 damping=0.017
      PathPoint P1: r_humerus (0.01269 -0.04375 0.0075)
      PathPoint default: r_humerus (0.01571552 -0.04373433 -0.00392883)
      PathPoint default: ground (0.02984 -0.06289387 0.1134333)
      PathPoint P4: ground (0.0525 -0.08417 0.08935)
      PathPoint P5: ground (0.05724 -0.11654 0.03787)
      # Not commenting-out these lines bring simulation time from 5s to 30s...!
    Thelen2003Muscle DELT1: min_control=0 max_control=1 time_scale=0.1 activation1=7.667 activation2=1.459854
        max_isometric_force=1218.9 optimal_fiber_length=0.0976 tendon_slack_length=0.097
        pennation_angle_at_optimal=0.3839724 damping=0.017
      PathPoint P1: r_humerus (0.00896 -0.11883 0.00585)
      PathPoint P2: r_humerus (0.01623 -0.11033 0.00412)
      # Commented out because no scapula in this model...
      PathPoint P3: scapula (0.04347 -0.03202 0.00139)
      PathPoint P4: clavicle (-0.014 0.01106 0.08021)
      # Not commenting-out these lines bring simulation time from 5s to 30s...!
    Thelen2003Muscle DELT2: min_control=0 max_control=1 time_scale=0.1 activation1=7.667 activation2=1.459854
        max_isometric_force=1103.5 optimal_fiber_length=0.1078 tendon_slack_length=0.1095
        pennation_angle_at_optimal=0.2617994 damping=0.017
      PathPoint P1: r_humerus (0.00461 -0.13611 0.0056)
      PathPoint P3: scapula (0.00005 0.00294 0.02233)
      PathPoint P4: scapula (-0.01078 -0.00034 0.0062)
      # Not commenting-out these lines bring simulation time from 5s to 30s...!
    Thelen2003Muscle DELT3: min_control=0 max_control=1 time_scale=0.1 activation1=7.667 activation2=1.459854
        max_isometric_force=201.6 optimal_fiber_length=0.1367 tendon_slack_length=0.038
        pennation_angle_at_optimal=0.3141593 max_contraction_velocity=0 damping=0.017
      PathPoint P1: scapula (-0.05573 0.00122 -0.02512)
      PathPoint P2: scapula (-0.07247 -0.03285 0.01233)
      PathPoint P3: r_humerus (0.00206 -0.07602 0.01045)
    Thelen2003Muscle SUPSP: time_scale=0.1 activation1=7.667 activation2=1.459854 max_isometric_force=487.82
        optimal_fiber_length=0.0682 tendon_slack_length=0.0395 pennation_angle=0.122173
      PathPoint SUPSP1: r_humerus (0.00256 0.01063 0.02593)
      PathPoint SUPSP2: scapula (-0.01918 0.00127 -0.01271)
      PathPoint SUPSP3: scapula (-0.044 -0.01512 -0.05855)
      # Not commenting-out these lines bring simulation time from 5s to 30s...!
    Thelen2003Muscle INFSP: min_control=0 max_control=1 time_scale=0.1 activation1=7.667 activation2=1.459854
        max_isometric_force=1075.8 optimal_fiber_length=0.0755 tendon_slack_length=0.0308
        pennation_angle_at_optimal=0.3316126 max_contraction_velocity=0 damping=0.017
      PathPoint P1: r_humerus (-0.00887 0.00484 0.02448)
      PathPoint P2: scapula (-0.07382 -0.05476 -0.04781)
      # Not commenting-out these lines bring simulation time from 5s to 30s...!
    Thelen2003Muscle TMIN: min_control=0 max_control=1 time_scale=0.1 activation1=7.667 activation2=1.459854
        max_isometric_force=269.5 optimal_fiber_length=0.0741 tendon_slack_length=0.0713
        pennation_angle_at_optimal=0.418879 max_contraction_velocity=0 damping=0.017
      PathPoint P1: r_humerus (-0.00127 -0.01259 0.022)
      PathPoint P2: scapula (-0.09473 -0.07991 -0.04737)
      PathPoint P3: scapula (-0.09643 -0.08121 -0.05298)
      # Not commenting-out these lines bring simulation time from 5s to 30s...!
    Thelen2003Muscle BRD: min_control=0 max_control=1 time_scale=0.1 activation1=7.667 activation2=1.459854
        max_isometric_force=276 optimal_fiber_length=0.1726 tendon_slack_length=0.133 pennation_angle_at_optimal=0
        max_contraction_velocity=0 damping=0.017
      PathPoint P1: r_humerus (-0.0098 -0.19963 0.00223)
      # The two following path points were modified 'by hand' to account for the fact that the radius is here modelled as a joint body ulna-radius-hand
      PathPoint P2: r_ulna_radius_hand (0.01 -0.08 0.035)
      PathPoint P3: r_ulna_radius_hand (0.01 -0.16 0.05)
      # Not commenting-out these lines bring simulation time from 5s to 30s...!
    CoordinateLimitForce r_shoulder_angle_LimitForce: coordinate=r_shoulder_angle upper_stiffness=.3 upper_limit=0
        lower_stiffness=.3 lower_limit=-180 damping=1 transition=5 compute_dissipation_energy=false
    CoordinateLimitForce r_shoulder_elev_LimitForce: coordinate=r_shoulder_elev upper_stiffness=.3 upper_limit=180
        lower_stiffness=.1 lower_limit=-90 damping=1 transition=5 compute_dissipation_energy=false
    CoordinateLimitForce r_elbow_flex_LimitForce: coordinate=r_elbow_flex upper_limit=130 lower_limit=0
        upper_stiffness=.9 lower_stiffness=.9 damping=1 transition=5 compute_dissipation_energy=false
    HuntCrossleyForce ObstacleForces1: transition_velocity=0.2
      ContactParametersSet contact_parameters:
        ContactParameters: geometry=(ThoraxContact1 ThoraxContact2 ForearmContact HumerusContact) stiffness=1000000
            dissipation=1 static_friction=0.8 dynamic_friction=0.4 viscous_friction=0.4
  MarkerSet:
    Marker hand: r_ulna_radius_hand (0.02 -0.4 0.1)
  ContactGeometrySet:
    ContactSphere HumerusContact: body_name=r_humerus location=(0 -.15 0) radius=0.05
    ContactSphere ForearmContact: body_name=r_ulna_radius_hand location=(0 -.05 0) radius=0.05
    ContactSphere ThoraxContact1: body_name=ground location=(-0.02 -0.1 0) orientation=(0 -0.1 0) radius=0.12
    ContactSphere ThoraxContact2: body_name=ground location=(-0.02 -0.3 0) radius=0.15
